// COMSOL Multiphysics 5.6.0.401 model "Anti_Reflection_structure.mph"
// Outline of the model tree

Parameters
  f_ref = 65 [GHz]
  lambda = c_const/(65 [GHz])
  ns = 4.4
  m = 0.0001 [m]
  H = (lambda/4)+m/2
  d = lambda/20
  w = (1-1/sqrt(ns))*lambda/20

Geometry
  geom1 "Geometry 1" (2D, length unit mm)
    r1: Rectangle | layername = Layer 1; layer = lambda; size = {d, H+2*lambda}
    r2: Rectangle | pos = {(d-w)/2, lambda}; size = {w, H}
    fin: Finalize "Form Union"

Materials
  mat1: Common "free space" on domains 2, 3
    def "Basic"
      relpermittivity = 1
      relpermeability = 1
      electricconductivity = 0
  mat2: Common "dielectric" on domains 1
    def "Basic"
      relpermittivity = ns^2
      relpermeability = 1
      electricconductivity = 0

Physics
  emw: ElectromagneticWaves "Electromagnetic Waves, Frequency Domain" on all domains
    dependent variable E = {Ex, Ey, Ez}
    wee1: WaveEquationElectric (default)
    pec1: PerfectElectricConductor (default)
    init1: init "Initial Values 1" (default)
    pec2: PerfectElectricConductor on boundaries 6-9
    pc1: PeriodicCondition on boundaries 3, 12
      PeriodicType = Floquet
      Floquet_source = FromPeriodicPort
      destinationDomains: boundaries 12
    pc2: PeriodicCondition on boundaries 1, 11
      PeriodicType = Floquet
      Floquet_source = FromPeriodicPort
      destinationDomains: boundaries 11
    port1: Port on boundaries 5 | PortType = Periodic; InputType = H; H0 = {0, 0, 1}; Hampl = {0, 0, 1}
    port2: Port on boundaries 2
      PortExcitation = off
      PortType = Periodic
      InputType = H
      H0 = {0, 0, 1}
      Hampl = {0, 0, 1}

Mesh
  mesh1 "Mesh 1" (physics-controlled)
    size: MeshSizeDefault | hauto = 1

Studies
  std1 "Study 1"
    param: Parametric "Parametric Sweep" | pname = f_ref; plistarr = range(32.5,0.5,97.5); punit = GHz
    freq: Frequency "Frequency Domain" | punit = GHz; plist = f_ref

Solver configurations
  sol1 "Solution 1" (study std1)
    v1: Variables "Dependent Variables 1"
    s1: Stationary "Stationary Solver 1" | stol = 0.01
      p1: Parametric | pname = freq; plistarr = f_ref; punit = GHz; pcontinuationmode = no
      fc1: FullyCoupled | linsolver = d1
      d1: Direct "Suggested Direct Solver (emw)" | linsolver = pardiso
  sol2 "Parametric Solutions 1" (study std1)

Datasets
  dset1: Solution | solution = sol1
  dset2: Solution | solution = sol2

Derived values
  gev1: EvalGlobal "S-parameter (emw)" | data = dset1; table = tbl1; expr = {emw.S11dB, emw.S21dB}

Tables
  tbl1: Table
    freq (GHz) | S11 (1) | S21 (1)
    65 | -22.2246 | -0.0260996

Plots
  pg1: PlotGroup2D "Electric Field (emw)" | data = dset2
    surf1: Surface | expr = emw.Hz
  pg2: PlotGroup1D "Polarization Plot (emw)" | data = dset1; title = Polarization states, Color: Phase (Radians)
    plz1: Polarization | legends = Reflection
      col1: Color "Color Expression 1" | expr = phase
    plz2: Polarization | legends = Transmission
      col1: Color "Color Expression 1" | expr = phase
  pg3: PlotGroup2D "Electric Field (emw) 1" | data = dset2
    surf1: Surface | expr = emw.Hx
  pg4: PlotGroup1D "S-parameter (emw)" | data = dset2; ylabel = S-parameter (dB)
    glob1: Global | expr = {emw.S11dB, emw.S21dB}; unit = {1, 1}; descr = {S11, S21}; xdata = expr; xdataexpr = f_ref
  pg5: SmithGroup "Smith Plot (emw)" | data = dset2
    rgr1: ReflectionGraph
      expr = emw.S11
      unit = 1
      descr = S11
      title = Reflection Graph: S-parameter, Color: Frequency (GHz)
      col1: Color "Color Expression 1" | expr = emw.freq/1e9
  pg6: PlotGroup1D "Polarization Plot (emw) 1" | data = dset2; title = Polarization states, Color: Phase (Radians)
    plz1: Polarization | legends = Reflection
      col1: Color "Color Expression 1" | expr = phase
    plz2: Polarization | legends = Transmission
      col1: Color "Color Expression 1" | expr = phase
  pg7: PlotGroup1D "1D Plot Group 7" | data = dset2
    glob1: Global | expr = abs(emw.S11); unit = 1; xdata = expr; xdataexpr = f_ref; legends = abs(emw.S11)
  pg8: PlotGroup1D "1D Plot Group 8" | data = dset2
    glob1: Global | expr = abs(emw.S11); xdata = expr; xdataexpr = f_ref; legends = abs(emw.S11)
  pg9: PlotGroup2D "2D Plot Group 9" | data = dset1
    surf1: Surface | expr = emw.Hy